*Heading
** Job name: gear_179_rP_24,99_rG_43,48_D_0,03_res Model name: gear_179_rP_24,99_rG_43,48_D_0,03
** Generated by: Abaqus/CAE 2019
*Preprint, echo=NO, model=NO, history=NO, contact=NO
**
** PARTS
**
*Part, name=Gear
*Node
      1,  -2.85974884,   2.09868717
      2,  -2.99762082,  0.103444889
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*Element, type=CPS8
   1,     1,     9,   906,   286, 12417, 12418, 12419, 12420
   2,     9,    10,   907,   906, 12421, 12422, 12423, 12418
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*Nset, nset=gear_set, generate
     1,  36937,      1
*Elset, elset=gear_set, generate
     1,  12106,      1
*Nset, nset=gear_edge
     2,     3,    29,    30,    31,    32
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*Elset, elset=gear_edge, generate
   21,  2520,    21
** Section: Section-1
*Solid Section, elset=gear_set, material=plexiglass
,
*End Part
**
*Part, name=Pinion
*Node
      1,  -2.99279809,  -0.17987147
      2,  -2.75325775,  -2.16547465
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*Element, type=CPS8
   1,     1,     9,   624,   286,  6735,  6736,  6737,  6738
   2,     9,    10,   625,   624,  6739,  6740,  6741,  6736
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*Nset, nset=pinion_set, generate
     1,  20001,      1
*Elset, elset=pinion_set, generate
    1,  6534,     1
*Nset, nset=pinion_edge
     1,     4,   168,   169,   170,   171
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*Elset, elset=pinion_edge, generate
    1,  2500,    21
** Section: Section-1
*Solid Section, elset=pinion_set, material=plexiglass
,
*End Part
**
**
** ASSEMBLY
**
*Assembly, name=Assembly
**
*Instance, name=Gear-1, part=Gear
*End Instance
**
*Instance, name=Pinion-1, part=Pinion
*End Instance
**
*Node
      1,           0.,  -29.9878273,           0.
*Node
      2,           0.,   48.4841728,           0.
*Nset, nset=_PickedSet9, internal
 1,
*Nset, nset=_PickedSet11, internal
 2,
*Nset, nset=_PickedSet14, internal
 1,
*Nset, nset=_PickedSet15, internal, instance=Pinion-1
     5,     6,     7,     8,   319,   546
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*Elset, elset=_PickedSet15, internal, instance=Pinion-1
 2569, 2570, 3112, 3137, 3592, 3593
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*Nset, nset=_PickedSet16, internal
 2,
*Nset, nset=_PickedSet17, internal
 2,
*Elset, elset=_m_Surf_pinion_S4, internal, instance=Pinion-1, generate
    1,  2500,    21
*Surface, type=ELEMENT, name=m_Surf_pinion
_m_Surf_pinion_S4, S4
*Elset, elset=_s_Surf_gear_S2, internal, instance=Gear-1, generate
   21,  2520,    21
*Surface, type=ELEMENT, name=s_Surf_gear
_s_Surf_gear_S2, S2
*Elset, elset=__PickedSurf8_S4, internal, instance=Pinion-1
 2569, 3615, 3618, 3620, 3622, 3623, 3837
*Elset, elset=__PickedSurf8_S3, internal, instance=Pinion-1
 2570, 3112, 3602, 3606, 3840, 3846, 5357
*Elset, elset=__PickedSurf8_S2, internal, instance=Pinion-1
 3137, 3599, 3600, 3601, 3608, 3609
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*Elset, elset=__PickedSurf8_S1, internal, instance=Pinion-1
 3592, 3593, 3594, 3595, 3596, 3597, 3598, 3603, 3604, 3605, 3607, 3611, 4357, 4358
*Surface, type=ELEMENT, name=_PickedSurf8, internal
__PickedSurf8_S4, S4
__PickedSurf8_S3, S3
__PickedSurf8_S2, S2
__PickedSurf8_S1, S1
*Elset, elset=__PickedSurf10_S2, internal, instance=Gear-1
 2602, 2603, 4400, 4401, 4402, 4403
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*Elset, elset=__PickedSurf10_S3, internal, instance=Gear-1
 3534, 3592, 4416, 4421, 4426, 4428, 4430, 4450, 4991, 4994, 4997, 7935, 7936, 7937
*Elset, elset=__PickedSurf10_S1, internal, instance=Gear-1
 4396, 4399, 4409, 4410, 4411, 4412
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*Elset, elset=__PickedSurf10_S4, internal, instance=Gear-1
 4397, 4398, 4404, 4440, 4447, 4972, 4992, 5000, 6802, 6803, 6805, 6806
*Surface, type=ELEMENT, name=_PickedSurf10, internal
__PickedSurf10_S2, S2
__PickedSurf10_S3, S3
__PickedSurf10_S4, S4
__PickedSurf10_S1, S1
** Constraint: Gear_coupling
*Coupling, constraint name=Gear_coupling, ref node=_PickedSet11, surface=_PickedSurf10
*Kinematic
2, 2
** Constraint: Pinion_coupling
*Coupling, constraint name=Pinion_coupling, ref node=_PickedSet9, surface=_PickedSurf8
*Kinematic
*End Assembly
**
** MATERIALS
**
*Material, name=plexiglass
*Elastic
3200., 0.4
**
** INTERACTION PROPERTIES
**
*Surface Interaction, name=IntProp-1
1.,
*Friction
0.,
*Surface Behavior, augmented Lagrange
**
** BOUNDARY CONDITIONS
**
** Name: Encastre_pinion Type: Symmetry/Antisymmetry/Encastre
*Boundary
_PickedSet14, ENCASTRE
** Name: y_disp_pinion Type: Displacement/Rotation
*Boundary
_PickedSet15, 2, 2
** Name: y_free_gear Type: Displacement/Rotation
*Boundary
_PickedSet16, 1, 1
_PickedSet16, 6, 6
**
** INTERACTIONS
**
** Interaction: cylinder_contact
*Contact Pair, interaction=IntProp-1, small sliding, type=SURFACE TO SURFACE
s_Surf_gear, m_Surf_pinion
** ----------------------------------------------------------------
**
** STEP: load
**
*Step, name=load, nlgeom=YES
*Static, stabilize, allsdtol=0.05, continue=YES
0.01, 1., 1e-05, 0.1
**
** BOUNDARY CONDITIONS
**
** Name: Displacement Type: Displacement/Rotation
*Boundary
_PickedSet17, 2, 2, -0.0332397
**
** OUTPUT REQUESTS
**
*Restart, write, frequency=0
**
** FIELD OUTPUT: F-Output-1
**
*Output, field
*Node Output
CF, RF, U
*Element Output, directions=YES
LE, PE, PEEQ, PEMAG, S
*Contact Output
CDISP, CDSTRESS, CFORCE, CSTATUS, CSTRESS
**
** HISTORY OUTPUT: H-Output-1
**
*Output, history, variable=PRESELECT
*End Step
